variable        T   equal  298
variable        dt  equal  0.5
variable        P   equal  1.0
variable        nsteps  equal 100
variable        thermo_freq equal 1
variable        dump_freq equal 1


processors      * * * map xyz

units           real
atom_style      full
boundary        p p p

read_data       initial.data
#read_restart    restart.old

pair_style      mbx 9.0
pair_modify     mix arithmetic

bond_style      none
angle_style     none
dihedral_style  none
improper_style  none

pair_coeff      * * 1 h2o 1 2 2 json mbx.json

neighbor        2.0 bin
neigh_modify    every 1 delay 10

timestep        ${dt}

compute         mbx all pair mbx
variable        e1bpip    equal c_mbx[1]
variable        e2bpip    equal c_mbx[2]
variable        e3bpip    equal c_mbx[3]
variable        e4bpip    equal c_mbx[4]
variable        edisp     equal c_mbx[5]
variable        ebuck     equal c_mbx[6]
variable        eperm     equal c_mbx[7]
variable        eind      equal c_mbx[8]
variable        eele      equal c_mbx[9]
variable        etot      equal c_mbx[10]

fix             1 all npt temp ${T} ${T} $(200.0*dt) iso 1.0 1.0 $(2000.0*dt)

velocity        all create ${T} 428459 rot yes dist gaussian
velocity        all zero linear
velocity        all zero angular

thermo_style    custom step time temp etotal ke pe enthalpy density lx ly lz vol pxx pyy pzz press
thermo          ${thermo_freq}
thermo_modify   flush yes


# Dipole moments in Debye units ##
variable dipnorm_tot atom sqrt(f__FIX_MBX_INTERNAL[7]*f__FIX_MBX_INTERNAL[7]+f__FIX_MBX_INTERNAL[8]*f__FIX_MBX_INTERNAL[8]+f__FIX_MBX_INTERNAL[9]*f__FIX_MBX_INTERNAL[9])/0.2081943 # original (total dipole)
variable dipnorm_ind atom sqrt(f__FIX_MBX_INTERNAL[4]*f__FIX_MBX_INTERNAL[4]+f__FIX_MBX_INTERNAL[5]*f__FIX_MBX_INTERNAL[5]+f__FIX_MBX_INTERNAL[6]*f__FIX_MBX_INTERNAL[6])/0.2081943 # induced
variable dipnorm_perm atom sqrt(f__FIX_MBX_INTERNAL[1]*f__FIX_MBX_INTERNAL[1]+f__FIX_MBX_INTERNAL[2]*f__FIX_MBX_INTERNAL[2]+f__FIX_MBX_INTERNAL[3]*f__FIX_MBX_INTERNAL[3])/0.2081943 # perm

variable dipx_perm atom f__FIX_MBX_INTERNAL[1]/0.2081943
variable dipy_perm atom f__FIX_MBX_INTERNAL[2]/0.2081943
variable dipz_perm atom f__FIX_MBX_INTERNAL[3]/0.2081943
variable dipx_ind atom f__FIX_MBX_INTERNAL[4]/0.2081943
variable dipy_ind atom f__FIX_MBX_INTERNAL[5]/0.2081943
variable dipz_ind atom f__FIX_MBX_INTERNAL[6]/0.2081943

# Dump details ##
dump            3 all custom 8 dump.dipoles id mol type q x y z v_dipx_perm v_dipy_perm v_dipz_perm v_dipnorm_perm v_dipx_ind v_dipy_ind v_dipz_ind v_dipnorm_ind
dump_modify     3 sort id

fix             thermo_print all print ${thermo_freq} "$(step) $(0.001*time) $(temp) $(etotal) $(ke) $(pe) $(enthalpy) $(density) $(lx) $(ly) $(lz) $(vol) $(pxx) $(pyy) $(pzz) $(press)" file thermo.out screen no title "# step time temp etotal ke pe enthalpy density lx ly lz vol pxx pyy pzz press"
fix             verbose_mbx_thermo_print all print ${thermo_freq} "$(step) $(0.001*time) $(temp) $(etotal) $(ke) $(pe) $(enthalpy) $(density) $(lx) $(ly) $(lz) $(vol) $(pxx) $(pyy) $(pzz) $(press) $(v_e1bpip) $(v_e2bpip) $(v_e3bpip) $(v_e4bpip) $(v_edisp) $(v_ebuck) $(v_eperm) $(v_eind) $(v_eele) $(v_etot)" file mbx_thermo.out screen no title "# step time temp etotal ke pe enthalpy density lx ly lz vol pxx pyy pzz press e1bpip e2bpip e3bpip e4bpip edisp ebuck eperm eind eele etot"

dump            1 all custom ${dump_freq} dump.lammpstrj id mol type q x y z
dump_modify     1 append no sort id format line "%d %d %d %8.4f %15.8f %15.8f %15.8f"

restart         10 restart.1 restart.2

run             ${nsteps} upto

write_data      final.data nocoeff
write_restart   restart.new
